// SBML level 2 version 4

function Rate_Law_for_r1(A, insulin, k1, D)
  A*insulin - k1/D;
end

model Model_1()
  // New Model

  // Compartments:
  compartment compartment_1 = 1;

  // Species:
  species A in compartment_1 = 1;
  species B in compartment_1 = 1;
  species insulin in compartment_1 = 1;
  species glucagon in compartment_1 = 1;
  species C in compartment_1 = 1;
  species D in compartment_1 = 1;

  // Reactions:
  r1: A + B -> C + D; compartment_1*Rate_Law_for_r1(A, insulin, k1, D);  // modifiers: insulin
    k1 = 0.1;

  // Unit definitions:
  unit volume = 1e-3 litre;
  unit substance = 1e-3 mole;
end
