// SBML level 2 version 4

function rate_GLUT2(Vmax, km, glc_ext, glc, keq)
  Vmax/km*(glc_ext - glc/keq)/(1 + glc_ext/km + glc/km);
end

model Koenig2012_Human_Hepatic_Glucose_Metabolism()
  // Quantifying the Contribution of the Liver to Glucose Homeostasis: A Detailed Kinetic Model of Human Hepatic Glucose Metabolism
  // Kinetic Model of Human Hepatic Glucose Metabolism
  // Authors Matthias Koenig, Sascha Bulik and Hermann-Georg Holzhuetter
  // Corresponding Author Matthias Koenig
  // matthias.koenig@charite.de
  // Charite Berlin, Computational Systems Biochemistry, Germany
  // Keywords hepatic glucose metabolism; kinetic model; glucose homeostasis; liver
  // Despite the crucial role of the liver in glucose homeostasis, a detailed mathematical model of human hepatic glucose metabolism is lacking so far. Here we present, a detailed kinetic model of glycolysis, gluconeogenesis and glycogen metabolism in human hepatocytes integrated with the hormonal control of these pathways by insulin, glucagon and epinephrine. Model simulations are in excellent agreement with experimental data on (i) the quantitative contributions of glycolysis, gluconeogenesis, and glycogen metabolism to hepatic glucose production and hepatic glucose utilization under varying physiological states. (ii) the time courses of postprandial glycogen storage as well as glycogen depletion in overnight fasting and short term fasting (iii) the switch from hepatic glucose production under hypoglycemia to hepatic glucose utilization under hyperglycemia essential for glucose homeostasis. Response analysis reveals an extra high capacity of the liver to counteract changes of plasma glucose level below 5 mM (hypoglycemia) and above 7.5 mM (hyperglycemia). Our model may serve as an important module of a whole-body model of human glucose metabolism and as a valuable tool for understanding the role of the liver in glucose homeostasis under normal conditions and in diseases like diabetes or glycogen storage diseases.
  // Compartments
  // Id Name Dimension Constant SBO GO
  // cyto cytosol 3 Y SBO:0000290 physical compartment GO:0005829 cytosol
  // blood blood 3 Y SBO:0000290 physical compartment GO:0005615 extracellular space
  // mito mitochondrion 3 Y SBO:0000290 physical compartment GO:0005739 mitochondrion
  // mm mitochondrial membrane 2 Y SBO:0000290 physical compartment GO:0031966 mitochondrial membrane
  // pm plasma membrane 2 Y SBO:0000290 physical compartment GO:0005886 plasma membrane
  // Species
  // Id Name Compartment Constant Init [mM] KEGG CHEBI UNIPROT SBO
  // atp ATP cyto Y 2.8 KEGG:C00002 CHEBI:15422 SBO:0000299 metabolite
  // adp ADP cyto Y 0.8 KEGG:C00008 CHEBI:16761 SBO:0000299 metabolite
  // amp AMP cyto Y 0.16 KEGG:C00020 CHEBI:16027 SBO:0000299 metabolite
  // utp UTP cyto N 0.27 KEGG:C00075 CHEBI:15713 SBO:0000299 metabolite
  // udp UDP cyto N 0.09 KEGG:C00015 CHEBI:17659 SBO:0000299 metabolite
  // gtp GTP cyto N 0.29 KEGG:C00044 CHEBI:15996 SBO:0000299 metabolite
  // gdp GDP cyto N 0.10 KEGG:C00035 CHEBI:17552 SBO:0000299 metabolite
  // nad NAD+ cyto Y 1.22 KEGG:C00003 CHEBI:15846 SBO:0000299 metabolite
  // nadh NADH cyto Y 5.60E-004 KEGG:C00004 CHEBI:16908 SBO:0000299 metabolite
  // p phosphate cyto Y 5 KEGG:C00009 SBO:0000299 metabolite
  // pp pyrophosphate cyto N 0.008 KEGG:C00013 SBO:0000299 metabolite
  // h2o H2O cyto Y 55000 KEGG:C00001 CHEBI:15377 SBO:0000299 metabolite
  // co2 CO2 cyto Y 5 KEGG:C00011 CHEBI:16526 SBO:0000299 metabolite
  // h H+ cyto Y 5.00E-008 KEGG:C00080 CHEBI:24636 SBO:0000299 metabolite
  // glc1p glucose-1-phosphate cyto N 0.012 KEGG:C00103 CHEBI:16077 SBO:0000299 metabolite
  // udpglc UDP-glucose cyto N 0.38 KEGG:C00029 CHEBI:18066 SBO:0000299 metabolite
  // glc glucose cyto N 5 KEGG:C00031 CHEBI:4167 SBO:0000299 metabolite
  // glyglc glycogen cyto N 250 KEGG:C00182 CHEBI:28087 SBO:0000299 metabolite
  // fru6p fructose-6-phosphate cyto N 0.05 KEGG:C00085 CHEBI:15946 SBO:0000299 metabolite
  // glc6p glucose-6-phosphate cyto N 0.12 KEGG:C00092 CHEBI:4170 SBO:0000299 metabolite
  // fru26bp fructose-2,6-bisphospate cyto N 0.004 KEGG:C00665 CHEBI:28602 SBO:0000299 metabolite
  // fru16bp fructose-1,6-bisphospate cyto N 0.02 KEGG:C00354 CHEBI:16905 SBO:0000299 metabolite
  // dhap dihydroxyacetone phosphate cyto N 0.03 KEGG:C00111 CHEBI:16108 SBO:0000299 metabolite
  // grap glyceraldehyde 3-phosphate cyto N 0.1 KEGG:C00118 CHEBI:29052 SBO:0000299 metabolite
  // pg3 3-phosphoglycerate cyto N 0.27 KEGG:C00197 CHEBI:17794 SBO:0000299 metabolite
  // bpg13 1,3-bisphospho-glycerate cyto N 0.3 KEGG:C00236 CHEBI:16001 SBO:0000299 metabolite
  // pep phosphoenolpyruvate cyto N 0.15 KEGG:C00074 CHEBI:44897 SBO:0000299 metabolite
  // pg2 2-phosphoglycerate cyto N 0.03 KEGG:C00631 CHEBI:17835 SBO:0000299 metabolite
  // oaa oxaloacetate cyto N 0.01 KEGG:C00036 CHEBI:30744 SBO:0000299 metabolite
  // pyr pyruvate cyto N 0.1 KEGG:C00022 CHEBI:32816 SBO:0000299 metabolite
  // glc_blood glucose blood Y 5 KEGG:C00031 CHEBI:4167 SBO:0000299 metabolite
  // lac lactate cyto N 0.5 KEGG:C00186 CHEBI:422 SBO:0000299 metabolite
  // p_mito phosphate mito Y 5 KEGG:C00009 SBO:0000299 metabolite
  // oaa_mito oxaloacetate mito N 0.01 KEGG:C00036 CHEBI:30744 SBO:0000299 metabolite
  // lac_blood lactate blood Y 1.2 KEGG:C00186 CHEBI:422 SBO:0000299 metabolite
  // co2_mito CO2 mito Y 5 KEGG:C00011 CHEBI:16526 SBO:0000299 metabolite
  // pyr_mito pyruvate mito N 0.1 KEGG:C00022 CHEBI:32816 SBO:0000299 metabolite
  // cit_mito citrate mito Y 0.32 KEGG:C00158 CHEBI:30769 SBO:0000299 metabolite
  // pep_mito pep mito N 0.15 KEGG:C00074 CHEBI:44897 SBO:0000299 metabolite
  // acoa_mito acetyl-coenzyme A mito Y 0.04 KEGG:C00024 CHEBI:15351 SBO:0000299 metabolite
  // gtp_mito GTP mito N 0.29 KEGG:C00044 CHEBI:15996 SBO:0000299 metabolite
  // gdp_mito GDP mito N 0.10 KEGG:C00035 CHEBI:17552 SBO:0000299 metabolite
  // atp_mito ATP mito Y 2.8 KEGG:C00002 CHEBI:15422 SBO:0000299 metabolite
  // adp_mito ADP mito Y 0.8 KEGG:C00008 CHEBI:16761 SBO:0000299 metabolite
  // nad_mito NAD+ mito Y 0.98 KEGG:C00003 CHEBI:15846 SBO:0000299 metabolite
  // h_mito H+ mito Y 1.00E-008 KEGG:C00011 CHEBI:24636 SBO:0000299 metabolite
  // coa_mito coenzymeA mito Y 0.055 KEGG:C00010 CHEBI:15346 SBO:0000299 metabolite
  // nadh_mito NADH mito Y 0.24 KEGG:C00004 CHEBI:16908 SBO:0000299 metabolite
  // epinephrine_blood epinephrine blood N 206.11 KEGG:C00547 CHEBI:18357 SBO:0000299 metabolite
  // glucagon_blood glucagon blood N 4.36E-008 KEGG:C01501 UNIPROT:P01275 SBO:0000299 metabolite
  // insulin_blood insulin blood N 7.61E-008 KEGG:C00723 UNIPROT:P01308 SBO:0000299 metabolite
  // h20_mito H2O mito Y 55000 KEGG:C00080 CHEBI:15377 SBO:0000299 metabolite
  // Reactions
  // Id Name Compartment Irreversible Vmax [µmol/kg/min] EC KEGG UNIPROT SBO
  // GLUT2 GLUT2 glucose transporter (facilitated diffusion) pm N 420 UNIPROT:P11168 SBO:0000284 transporter
  // GK Glucokinase, hexokinase IV cyto Y 25.2 EC:2.7.1.2 KEGG:R00299 UNIPROT:P35557 SBO:0000014 enzyme
  // G6PASE Glucose-6-phosphatase cyto Y 18.9 EC:3.1.3.9 KEGG:R00303 UNIPROT:P35575 SBO:0000014 enzyme
  // GPI Glucose-6-phosphate isomerase cyto N 420 EC:5.3.1.9 KEGG:R00771 UNIPROT:P06744 SBO:0000014 enzyme
  // G16PI glucose-1-phosphate 1,6-phosphomutase cyto N 100 EC:5.4.2.2 KEGG:R00959 UNIPROT:P36871, UNIPROT:Q96G03 SBO:0000014 enzyme
  // UPGASE UTP:Glucose-1-phosphate uridylyltransferase cyto N 80 EC:2.7.7.9 KEGG:R00289 UNIPROT:Q16851 SBO:0000014 enzyme
  // PPASE Pyrophosphate phosphohydrolase cyto Y 2.4 EC:3.6.1.1 KEGG:R00004 UNIPROT:Q15181 SBO:0000014 enzyme
  // GS Glycogen synthase cyto Y 13.2 UNIPROT:P54840 SBO:0000014 enzyme
  // GP Glycogen phosphorylase cyto N 6.8 UNIPROT:P06737 SBO:0000014 enzyme
  // NTK (GTP) Nucleosid diphosphate kinase (GTP) cyto N 0 EC:2.7.4.6 KEGG:R00330 SBO:0000014 enzyme
  // NTK (UTP) Nucleosid diphosphate kinase (UTP) cyto N 2940 EC:2.7.4.6 KEGG:R00156 SBO:0000014 enzyme
  // AK Adenylat kinase cyto N 0 EC:2.7.4.3 KEGG:R00127 SBO:0000014 enzyme
  // PFK2 Phosphofructo kinase 2 cyto Y 0.0042 EC:2.7.1.105 KEGG:R02732 UNIPROT:P16118 SBO:0000014 enzyme
  // FBP2 Fructose-2,6-bisphosphatase cyto Y 0.126 EC:3.1.3.46 KEGG:R02731 UNIPROT:P16118 SBO:0000014 enzyme
  // PFK1 Phosphofructo kinase 1 cyto Y 7.182 EC:2.7.1.11 KEGG:R00756 UNIPROT:P17858 SBO:0000014 enzyme
  // FBP1 Fructose-1,6-bisphosphatase cyto Y 4.326 EC:3.1.3.11 KEGG:R00762 UNIPROT:O00757, UNIPROT:P09467 SBO:0000014 enzyme
  // TPI Triosephosphate isomerase cyto N 420 EC:5.3.1.1 KEGG:R01015 UNIPROT:P60174 SBO:0000014 enzyme
  // ALD Aldolase cyto N 420 EC:4.1.2.13 KEGG:R01068 UNIPROT:P05062 SBO:0000014 enzyme
  // PGK Phosphoglycerate kinase cyto N 420 EC:2.7.2.3 KEGG:R01512 UNIPROT:P00558 SBO:0000014 enzyme
  // GAPDH Glyceraldehydephosphate dehydrogenase cyto N 420 EC:1.2.1.12 KEGG:R01061 UNIPROT:P04406 SBO:0000014 enzyme
  // EN Enolase cyto N 35.994 EC:4.2.1.11 KEGG:R00658 UNIPROT:P06733, UNIPROT:P09104, UNIPROT:P13929 SBO:0000014 enzyme
  // PGAM 3-Phosphoglycerate mutase cyto N 420 EC:5.4.2.1 KEGG:R01518 UNIPROT:P18669 SBO:0000014 enzyme
  // PEPCK Phosphoenolpyruvate carboxykinase cyto N 0 EC:4.1.1.32 KEGG:R00431 UNIPROT:P35558 SBO:0000014 enzyme
  // PK Pyruvate kinase cyto Y 46.2 EC:2.7.1.40 KEGG:R00200 UNIPROT:P30613 SBO:0000014 enzyme
  // PC Pyruvate Carboxylase mito Y 168 EC:6.4.1.1 KEGG:R00344 UNIPROT:P11498 SBO:0000014 enzyme
  // PEPCK_mito Phosphoenolpyruvate carboxykinase mito N 546 EC:4.1.1.32 KEGG:R00431 UNIPROT:Q16822 SBO:0000014 enzyme
  // LACT Lactate transporter pm N 5.418 SBO:0000284 transporter
  // LDH Lactate dehydrogenase cyto N 12.6 EC:1.1.1.27 -KEGG:R00703 UNIPROT:P00338, UNIPROT:P07195, UNIPROT:P07864 SBO:0000014 enzyme
  // PEPT PEP transporter mm N 33.6 SBO:0000284 transporter
  // PYRT Pyruvate transporter mm N 42 SBO:0000284 transporter
  // CS Citrate synthase mito N 4.2 EC:2.3.3.1 -KEGG:R00351 UNIPROT:O75390 SBO:0000014 enzyme
  // PDH Pyruvate dehydrogenase mito Y 13.44 EC:1.2.4.1 KEGG:R00209 UNIPROT:P08559, UNIPROT:P11177, UNIPROT:P10515, UNIPROT:P09622, O00330 SBO:0000014 enzyme
  // ACOAFLX Acetyl-CoA flux mito N 0 SBO:0000014 enzyme
  // VCITFLX Citrate flux mito N 0 SBO:0000014 enzyme
  // NDK_mito Nucleosid diphosphate kinase (GTP) mito N 420 EC:2.7.4.6 KEGG:R00330 SBO:0000014 enzyme
  // OAAFLX Oxalacetate flux mito N 0 SBO:0000014 enzyme

  // Compartments:
  compartment cyto = 5;
  compartment blood = 10000;
  compartment mito = 1;
  compartment mm = 0;  // 2-D
  compartment pm = 0;  // 2-D

  // Species:
  species atp in cyto = 2.8;  // substance in mM
  species adp in cyto = 0.8;  // substance in mM
  species amp in cyto = 0.16;  // substance in mM
  species utp in cyto = 0.27;  // substance in mM
  species udp in cyto = 0.09;  // substance in mM
  species gtp in cyto = 0.29;  // substance in mM
  species gdp in cyto = 0.1;  // substance in mM
  species nad in cyto = 1.22;  // substance in mM
  species nadh in cyto = 0.00056;  // substance in mM
  species p in cyto = 5;  // substance in mM
  species pp in cyto = 0.008;  // substance in mM
  species h2o in cyto = 55000;  // substance in mM
  species co2 in cyto = 5;  // substance in mM
  species h in cyto = 5e-8;  // substance in mM
  species glc1p in cyto = 0.012;  // substance in mM
  species udpglc in cyto = 0.38;  // substance in mM
  species glc in cyto = 5;  // substance in mM
  species glyglc in cyto = 250;  // substance in mM
  species fru6p in cyto = 0.05;  // substance in mM
  species glc6p in cyto = 0.12;  // substance in mM
  species fru26bp in cyto = 0.004;  // substance in mM
  species fru16bp in cyto = 0.02;  // substance in mM
  species dhap in cyto = 0.03;  // substance in mM
  species grap in cyto = 0.1;  // substance in mM
  species pg3 in cyto = 0.27;  // substance in mM
  species bpg13 in cyto = 0.3;  // substance in mM
  species pep in cyto = 0.15;  // substance in mM
  species pg2 in cyto = 0.03;  // substance in mM
  species oaa in cyto = 0.01;  // substance in mM
  species pyr in cyto = 0.1;  // substance in mM
  species glc_blood in blood = 5;  // substance in mM
  species lac in cyto = 0.5;  // substance in mM
  species p_mito in mito = 5;  // substance in mM
  species oaa_mito in mito = 0.01;  // substance in mM
  species lac_blood in blood = 1.2;  // substance in mM
  species co2_mito in mito = 5;  // substance in mM
  species pyr_mito in mito = 0.1;  // substance in mM
  species cit_mito in mito = 0.32;  // substance in mM
  species pep_mito in mito = 0.15;  // substance in mM
  species acoa_mito in mito = 0.04;  // substance in mM
  species gtp_mito in mito = 0.29;  // substance in mM
  species gdp_mito in mito = 0.1;  // substance in mM
  species atp_mito in mito = 2.8;  // substance in mM
  species adp_mito in mito = 0.8;  // substance in mM
  species nad_mito in mito = 0.98;  // substance in mM
  species h_mito in mito = 1e-8;  // substance in mM
  species coa_mito in mito = 0.055;  // substance in mM
  species nadh_mito in mito = 0.24;  // substance in mM
  species epinephrine_blood in blood = 206.11;  // substance in mM
  species glucagon_blood in blood = 4.36e-8;  // substance in mM
  species insulin_blood in blood = 7.61e-8;  // substance in mM
  species h20_mito in mito = 55000;  // substance in mM

  // Reactions:
  GLUT2: glc_blood -> glc; rate_GLUT2(Vmax, km, glc_blood, glc, keq);
    Vmax = 10; km = 42; keq = 1;
  GK: atp + glc => adp + glc6p; ;
  G6PASE: h2o + glc6p => p + glc; ;
  GPI: glc6p -> fru6p; ;
  G16PI: glc1p -> glc6p; ;
  UPGASE: utp + glc1p -> pp + udpglc; ;
  PPASE: pp + h2o => 2 p; ;
  GS: udpglc => udp + glyglc; ;
  GP: p + glyglc -> glc1p; ;
  AK: atp + amp -> 2 adp; ;
  PFK2: atp + fru6p => adp + fru26bp; ;
  FBP2: h2o + fru26bp => p + fru6p; ;
  PFK1: atp + fru6p => adp + fru16bp; ;
  FBP1: h2o + fru16bp => p + fru6p; ;
  ALD: fru16bp -> grap + dhap; ;
  TPI: dhap -> grap; ;
  GAPDH: nad + p + grap -> nadh + h + bpg13; ;
  PGK: adp + bpg13 -> atp + pg3; ;
  PGAM: pg3 -> pg2; ;
  EN: pg2 -> h2o + pep; ;
  PK: adp + pep => atp + pyr; ;
  PEPCK: gtp + oaa -> gdp + co2 + pep; ;
  PEPCK_mito: oaa_mito + gtp_mito -> co2_mito + pep_mito + gdp_mito + nadh_mito + nad_mito + h_mito; ;
  PC: co2_mito + pyr_mito + atp_mito => p_mito + oaa_mito + adp_mito; ;
  LDH: nadh + h + pyr -> nad + lac; ;
  LACT: lac_blood -> lac; ;
  PYRT: pyr -> pyr_mito; ;
  PEPT: pep_mito -> pep; ;
  PDH: pyr_mito + coa_mito + nad_mito => co2_mito + acoa_mito + nadh_mito + h_mito; ;
  CS: oaa_mito + acoa_mito + h20_mito -> cit_mito + coa_mito; ;
  NDK_mito: atp_mito + gdp_mito -> adp_mito + gtp_mito; ;
  OAAFLX: -> oaa_mito; ;
  ACOAFLX: acoa_mito -> ; ;
  VCITFLX: cit_mito -> ; ;
  NTK_GTP: atp + gdp -> adp + gtp; ; NTK_GTP is "NTK (GTP)";
  NTK_UTP: atp + udp -> adp + utp; ; NTK_UTP is "NTK (UTP)";

  // Unit definitions:
  unit mM = 1e-3 mole / litre;
end
