// SBML level 2 version 4

function gamma(ins, glu, epi)
  0.5*(1 - ins/(ins + 1) + max(glu/(glu + 1), 0.8*epi/(epi + 1)));
end

model Koenig2012_Hepatic_Glucose_Metabolism()

  // Compartments:
  compartment default = 1 volume;
  compartment cytosol in blood = 1 volume;
  compartment blood in default = 1 volume;
  compartment mitochondrion in cytosol = 1 volume;

  // Species:
  species glc in cytosol = 0;
  species $glc_ext in blood = 3;  // kegg.compound:C00345
  species ins in blood;

  // Parameters:
  K_ins = 0.1 substance;

  // Assignment rules:
  ins := 5*glc_ext;

  // Reactions:
  GLUT2: $glc_ext -> glc; scale_gly*v1_Vmax/v1_km*(glc_ext - glc/v1_keq)/(1 + glc_ext/v1_km + glc/v1_km)*gamma(glc, glc, glc);
    scale_gly = 12.5 dimensionless; v1_Vmax = 420 dimensionless; v1_km = 42 substance; v1_keq = 1 dimensionless;

  // Unit definitions:
  unit substance = mole;
  unit volume = litre;
  unit area = metre^2;
  unit length = metre;
  unit time = second;
  unit mM = 1e-3 mole / litre;
end
