// SBML level 3 version 1

function max(x, y)
  piecewise(x, x > y, y);
end

function min(x, y)
  piecewise(x, x < y, y);
end

model Koenig2014_hepatic_glucose_annotated()
  // Koenig2014_hepatic_glucose
  // model units - substance: substance, volume: volume, area: area, length: length

  // Compartments:
  compartment extern = 10 litre;
  compartment cyto = 1 litre;
  compartment mito = 5 litre;

  // Species:
  species $atp in cyto = 2.8;  // substance in mM_litre; kegg.compound:C00002; CHEBI:15422
  species $adp in cyto = 0.8;  // substance in mM_litre; kegg.compound:C00008; CHEBI:16761
  species $amp in cyto = 0.16;  // substance in mM_litre; kegg.compound:C00020; CHEBI:16027
  species utp in cyto = 0.27;  // substance in mM_litre; kegg.compound:C00075; CHEBI:15713
  species udp in cyto = 0.09;  // substance in mM_litre; kegg.compound:C00015; CHEBI:17659
  species gtp in cyto = 0.29;  // substance in mM_litre; kegg.compound:C00044; CHEBI:15996
  species gdp in cyto = 0.1;  // substance in mM_litre; kegg.compound:C00035; CHEBI:17552
  species $nad in cyto = 1.22;  // substance in mM_litre; kegg.compound:C00003; CHEBI:15846
  species $nadh in cyto = 0.00056;  // substance in mM_litre; kegg.compound:C00004; CHEBI:16908
  species $phos in cyto = 5;  // substance in mM_litre; kegg.compound:C00009
  species pp in cyto = 0.008;  // substance in mM_litre; kegg.compound:C00013
  species $co2 in cyto = 5;  // substance in mM_litre; kegg.compound:C00011; CHEBI:16526
  species $h2o in cyto = 0;  // substance in mM_litre; kegg.compound:C00001; CHEBI:15377
  species $h in cyto = 0;  // substance in mM_litre; kegg.compound:C00080; CHEBI:24636
  species glc1p in cyto = 0.012;  // substance in mM_litre; kegg.compound:C00103; CHEBI:16077
  species udpglc in cyto = 0.38;  // substance in mM_litre; kegg.compound:C00029; CHEBI:18066
  species glyglc in cyto = 250;  // substance in mM_litre; kegg.compound:C00182; CHEBI:28087
  species glc in cyto = 5;  // substance in mM_litre; kegg.compound:C00031; CHEBI:4167
  species glc6p in cyto = 0.12;  // substance in mM_litre; kegg.compound:C00092; CHEBI:4170
  species fru6p in cyto = 0.05;  // substance in mM_litre; kegg.compound:C00085; CHEBI:15946
  species fru16bp in cyto = 0.02;  // substance in mM_litre; kegg.compound:C00354; CHEBI:16905
  species fru26bp in cyto = 0.004;  // substance in mM_litre; kegg.compound:C00665; CHEBI:28602
  species grap in cyto = 0.1;  // substance in mM_litre; kegg.compound:C00118; CHEBI:29052
  species dhap in cyto = 0.03;  // substance in mM_litre; kegg.compound:C00111; CHEBI:16108
  species bpg13 in cyto = 0.3;  // substance in mM_litre; kegg.compound:C00236; CHEBI:16001
  species pg3 in cyto = 0.27;  // substance in mM_litre; kegg.compound:C00197; CHEBI:17794
  species pg2 in cyto = 0.03;  // substance in mM_litre; kegg.compound:C00631; CHEBI:17835
  species pep in cyto = 0.15;  // substance in mM_litre; kegg.compound:C00074; CHEBI:44897
  species pyr in cyto = 0.1;  // substance in mM_litre; kegg.compound:C00022; CHEBI:32816
  species oaa in cyto = 0.01;  // substance in mM_litre; kegg.compound:C00036; CHEBI:30744
  species lac in cyto = 0.5;  // substance in mM_litre; kegg.compound:C00186; CHEBI:422
  species $glc_ext in extern = 3;  // substance in mM_litre; kegg.compound:C00031; CHEBI:4167
  species $lac_ext in extern = 1.2;  // substance in mM_litre; kegg.compound:C00186; CHEBI:422
  species $co2_mito in mito = 5;  // substance in mM_litre; kegg.compound:C00011; CHEBI:16526
  species $phos_mito in mito = 5;  // substance in mM_litre; kegg.compound:C00009
  species oaa_mito in mito = 0.01;  // substance in mM_litre; kegg.compound:C00036; CHEBI:30744
  species pep_mito in mito = 0.15;  // substance in mM_litre; kegg.compound:C00074; CHEBI:44897
  species $acoa_mito in mito = 0.04;  // substance in mM_litre; kegg.compound:C00024; CHEBI:15351
  species pyr_mito in mito = 0.1;  // substance in mM_litre; kegg.compound:C00022; CHEBI:32816
  species $cit_mito in mito = 0.32;  // substance in mM_litre; kegg.compound:C00158; CHEBI:30769
  species $atp_mito in mito = 2.8;  // substance in mM_litre; kegg.compound:C00002; CHEBI:15422
  species $adp_mito in mito = 0.8;  // substance in mM_litre; kegg.compound:C00008; CHEBI:16761
  species gtp_mito in mito = 0.29;  // substance in mM_litre; kegg.compound:C00044; CHEBI:15996
  species gdp_mito in mito = 0.1;  // substance in mM_litre; kegg.compound:C00035; CHEBI:17552
  species $coa_mito in mito = 0.055;  // substance in mM_litre; kegg.compound:C00010; CHEBI:15346
  species $nadh_mito in mito = 0.24;  // substance in mM_litre; kegg.compound:C00004; CHEBI:16908
  species $nad_mito in mito = 0.98;  // substance in mM_litre; kegg.compound:C00003; CHEBI:15846
  species $h2o_mito in mito = 0;  // substance in mM_litre; kegg.compound:C00080; CHEBI:15377
  species $h_mito in mito = 0;  // substance in mM_litre; kegg.compound:C00011; CHEBI:24636

  // Parameters:
  nadh_tot has mM;
  atp_tot has mM;
  utp_tot has mM;
  gtp_tot has mM;
  nadh_mito_tot has mM;
  atp_mito_tot has mM;
  gtp_mito_tot has mM;
  x_ins1 = 818.9 pmol_per_l;
  x_ins2 = 0 pmol_per_l;
  x_ins3 = 8.6 mM;
  x_ins4 = 4.2 dimensionless;
  ins = max(0, (x_ins1 - x_ins2)*glc_ext^x_ins4/(glc_ext^x_ins4 + x_ins3^x_ins4)); ins has pmol_per_l;  // kegg.compound:C00723
  x_glu1 = 190 pmol_per_l;
  x_glu2 = 37.9 pmol_per_l;
  x_glu3 = 3.01 mM;
  x_glu4 = 6.4 dimensionless;
  glu = max(0, (x_glu1 - x_glu2)*(1 - glc_ext^x_glu4/(glc_ext^x_glu4 + x_glu3^x_glu4))); glu has pmol_per_l;  // kegg.compound:C01501
  x_epi1 = 6090 pmol_per_l;
  x_epi2 = 100 pmol_per_l;
  x_epi3 = 3.1 mM;
  x_epi4 = 8.4 dimensionless;
  epi = max(0, (x_epi1 - x_epi2)*(1 - glc_ext^x_epi4/(glc_ext^x_epi4 + x_epi3^x_glu4))); epi has pmol_per_l;  // kegg.compound:C00547; CHEBI:18357
  K_val = 0.1 dimensionless;
  epi_f = 0.8 dimensionless;
  K_ins = (x_ins1 - x_ins2)*K_val; K_ins has pmol_per_l;
  K_glu = (x_glu1 - x_glu2)*K_val; K_glu has pmol_per_l;
  K_epi = (x_epi1 - x_epi2)*K_val; K_epi has pmol_per_l;
  gamma = 0.5*(1 - ins/(ins + K_ins) + max(glu/(glu + K_glu), epi_f*epi/(epi + K_epi))); gamma has dimensionless;
  scale_gly = 12.5 dimensionless;
  scale_glyglc = 12.5 dimensionless;
  GLUT2_keq = 1 dimensionless;
  GLUT2_km = 42 mM;
  GLUT2_Vmax = 420 mmol_per_s;
  GK_n_gkrp = 2 dimensionless;
  GK_km_glc1 = 15 mM;
  GK_km_fru6p = 0.01 mM;
  GK_b = 0.7 dimensionless;
  GK_n = 1.6 dimensionless;
  GK_km_glc = 7.5 mM;
  GK_km_atp = 0.26 mM;
  GK_Vmax = 25.2 mmol_per_s;
  GK_gc_free = glc^GK_n_gkrp/(glc^GK_n_gkrp + GK_km_glc1^GK_n_gkrp)*(1 - GK_b*fru6p/(fru6p + GK_km_fru6p)); GK_gc_free has dimensionless;
  G6PASE_km_glc6p = 2 mM;
  G6PASE_Vmax = 18.9 mmol_per_s;
  GPI_keq = 0.5170608 dimensionless;
  GPI_km_glc6p = 0.182 mM;
  GPI_km_fru6p = 0.071 mM;
  GPI_Vmax = 420 mmol_per_s;
  G16PI_keq = 15.71755 dimensionless;
  G16PI_km_glc6p = 0.67 mM;
  G16PI_km_glc1p = 0.045 mM;
  G16PI_Vmax = 100 mmol_per_s;
  UPGASE_keq = 0.3122376 dimensionless;
  UPGASE_km_utp = 0.563 mM;
  UPGASE_km_glc1p = 0.172 mM;
  UPGASE_km_udpglc = 0.049 mM;
  UPGASE_km_pp = 0.166 mM;
  UPGASE_Vmax = 80 mmol_per_s;
  PPASE_km_pp = 0.005 mM;
  PPASE_Vmax = 2.4 mmol_per_s;
  GS_C = 500 mM;
  GS_k1_max = 0.2 dimensionless;
  GS_k1_nat = 0.224 mMmM;
  GS_k2_nat = 0.1504 mM;
  GS_k1_phospho = 3.003 mMmM;
  GS_k2_phospho = 0.09029 mM;
  GS_Vmax = 13.2 mmol_per_s;
  GS_storage_factor = (1 + GS_k1_max)*(GS_C - glyglc)/(GS_C - glyglc + GS_k1_max*GS_C); GS_storage_factor has dimensionless;
  GS_k_udpglc_native = GS_k1_nat/(glc6p + GS_k2_nat); GS_k_udpglc_native has mM;
  GS_k_udpglc_phospho = GS_k1_phospho/(glc6p + GS_k2_phospho); GS_k_udpglc_phospho has mM;
  GS_native = scale_glyglc*GS_Vmax*GS_storage_factor*udpglc/(GS_k_udpglc_native + udpglc); GS_native has mmol_per_s;
  GS_phospho = scale_glyglc*GS_Vmax*GS_storage_factor*udpglc/(GS_k_udpglc_phospho + udpglc); GS_phospho has mmol_per_s;
  GP_keq = 0.2118265 per_mM;
  GP_k_glyc_native = 4.8 mM;
  GP_k_glyc_phospho = 2.7 mM;
  GP_k_glc1p_native = 120 mM;
  GP_k_glc1p_phospho = 2 mM;
  GP_k_p_native = 300 mM;
  GP_k_p_phospho = 5 mM;
  GP_ki_glc_phospho = 5 mM;
  GP_ka_amp_native = 1 mM;
  GP_base_amp_native = 0.03 mmol_per_s;
  GP_max_amp_native = 0.3 mmol_per_s;
  GP_Vmax = 6.8 mmol_per_s;
  GP_C = GS_C; GP_C has mM;
  GP_k1_max = GS_k1_max; GP_k1_max has dimensionless;
  GP_fmax = (1 + GP_k1_max)*glyglc/(glyglc + GP_k1_max*GP_C); GP_fmax has dimensionless;
  GP_vmax_native = scale_glyglc*GP_Vmax*GP_fmax*(GP_base_amp_native + (GP_max_amp_native - GP_base_amp_native)*amp/(amp + GP_ka_amp_native)); GP_vmax_native has mmol_per_s;
  GP_native = GP_vmax_native/(GP_k_glyc_native*GP_k_p_native)*(glyglc*phos - glc1p/GP_keq)/((1 + glyglc/GP_k_glyc_native)*(1 + phos/GP_k_p_native) + 1 + glc1p/GP_k_glc1p_native - 1); GP_native has mmol_per_s;
  GP_vmax_phospho = scale_glyglc*GP_Vmax*GP_fmax*exp(-ln(2)/GP_ki_glc_phospho*glc); GP_vmax_phospho has mmol_per_s;
  GP_phospho = GP_vmax_phospho/(GP_k_glyc_phospho*GP_k_p_phospho)*(glyglc*phos - glc1p/GP_keq)/((1 + glyglc/GP_k_glyc_phospho)*(1 + phos/GP_k_p_phospho) + 1 + glc1p/GP_k_glc1p_phospho - 1); GP_phospho has mmol_per_s;
  NDKGTP_keq = 1 dimensionless;
  NDKGTP_km_atp = 1.33 mM;
  NDKGTP_km_adp = 0.042 mM;
  NDKGTP_km_gtp = 0.15 mM;
  NDKGTP_km_gdp = 0.031 mM;
  NDKGTP_Vmax = 0 mM;
  NDKUTP_keq = 1 dimensionless;
  NDKUTP_km_atp = 1.33 mM;
  NDKUTP_km_adp = 0.042 mM;
  NDKUTP_km_utp = 16 mM;
  NDKUTP_km_udp = 0.19 mM;
  NDKUTP_Vmax = 2940 mmol_per_s;
  AK_keq = 0.2473901 dimensionless;
  AK_km_atp = 0.09 mM;
  AK_km_amp = 0.08 mM;
  AK_km_adp = 0.11 mM;
  AK_Vmax = 0 mmol_per_s;
  PFK2_n_native = 1.3 dimensionless;
  PFK2_n_phospho = 2.1 dimensionless;
  PFK2_k_fru6p_native = 0.016 mM;
  PFK2_k_fru6p_phospho = 0.05 mM;
  PFK2_k_atp_native = 0.28 mM;
  PFK2_k_atp_phospho = 0.65 mM;
  PFK2_Vmax = 0.0042 mmol_per_s;
  PFK2_native = scale_gly*PFK2_Vmax*fru6p^PFK2_n_native/(fru6p^PFK2_n_native + PFK2_k_fru6p_native^PFK2_n_native)*atp/(atp + PFK2_k_atp_native); PFK2_native has mmol_per_s;
  PFK2_phospho = scale_gly*PFK2_Vmax*fru6p^PFK2_n_phospho/(fru6p^PFK2_n_phospho + PFK2_k_fru6p_phospho^PFK2_n_phospho)*atp/(atp + PFK2_k_atp_phospho); PFK2_phospho has mmol_per_s;
  FBP2_km_fru26bp_native = 0.01 mM;
  FBP2_ki_fru6p_native = 0.0035 mM;
  FBP2_km_fru26bp_phospho = 0.0005 mM;
  FBP2_ki_fru6p_phospho = 0.01 mM;
  FBP2_Vmax = 0.126 mmol_per_s;
  FBP2_native = scale_gly*FBP2_Vmax/(1 + fru6p/FBP2_ki_fru6p_native)*fru26bp/(FBP2_km_fru26bp_native + fru26bp); FBP2_native has mmol_per_s;
  FBP2_phospho = scale_gly*FBP2_Vmax/(1 + fru6p/FBP2_ki_fru6p_phospho)*fru26bp/(FBP2_km_fru26bp_phospho + fru26bp); FBP2_phospho has mmol_per_s;
  PFK1_km_atp = 0.111 mM;
  PFK1_km_fru6p = 0.077 mM;
  PFK1_ki_fru6p = 0.012 mM;
  PFK1_ka_fru26bp = 0.001 mM;
  PFK1_Vmax = 7.182 mmol_per_s;
  FBP1_ki_fru26bp = 0.001 mM;
  FBP1_km_fru16bp = 0.0013 mM;
  FBP1_Vmax = 4.326 mmol_per_s;
  ALD_keq = 9.762989e-5 per_mM;
  ALD_km_fru16bp = 0.0071 mM;
  ALD_km_dhap = 0.0364 mM;
  ALD_km_grap = 0.0071 mM;
  ALD_ki1_grap = 0.0572 mM;
  ALD_ki2_grap = 0.176 mM;
  ALD_Vmax = 420 mmol_per_s;
  TPI_keq = 0.05447699 dimensionless;
  TPI_km_dhap = 0.59 mM;
  TPI_km_grap = 0.42 mM;
  TPI_Vmax = 420 mmol_per_s;
  GAPDH_keq = 0.08677987 dimensionless;
  GAPDH_k_nad = 0.05 mM;
  GAPDH_k_grap = 0.005 mM;
  GAPDH_k_p = 3.9 mM;
  GAPDH_k_nadh = 0.0083 mM;
  GAPDH_k_bpg13 = 0.0035 mM;
  GAPDH_Vmax = 420 mmol_per_s;
  PGK_keq = 6.958644 dimensionless;
  PGK_k_adp = 0.35 mM;
  PGK_k_atp = 0.48 mM;
  PGK_k_bpg13 = 0.002 mM;
  PGK_k_pg3 = 1.2 mM;
  PGK_Vmax = 420 mmol_per_s;
  PGM_keq = 0.1813754 dimensionless;
  PGM_k_pg3 = 5 mM;
  PGM_k_pg2 = 1 mM;
  PGM_Vmax = 420 mmol_per_s;
  EN_keq = 0.05447699 dimensionless;
  EN_k_pep = 1 mM;
  EN_k_pg2 = 1 mM;
  EN_Vmax = 35.994 mmol_per_s;
  PK_n = 3.5 dimensionless;
  PK_n_p = 3.5 dimensionless;
  PK_n_fbp = 1.8 dimensionless;
  PK_n_fbp_p = 1.8 dimensionless;
  PK_alpha = 1 dimensionless;
  PK_alpha_p = 1.1 dimensionless;
  PK_alpha_end = 1 dimensionless;
  PK_k_fbp = 0.00016 mM;
  PK_k_fbp_p = 0.00035 mM;
  PK_k_pep = 0.58 mM;
  PK_k_pep_p = 1.1 mM;
  PK_k_pep_end = 0.08 mM;
  PK_k_adp = 2.3 mM;
  PK_base_act = 0.08 mM;
  PK_base_act_p = 0.04 mM;
  PK_Vmax = 46.2 mmol_per_s;
  PK_f = fru16bp^PK_n_fbp/(PK_k_fbp^PK_n_fbp + fru16bp^PK_n_fbp); PK_f has dimensionless;
  PK_f_p = fru16bp^PK_n_fbp_p/(PK_k_fbp_p^PK_n_fbp_p + fru16bp^PK_n_fbp_p); PK_f_p has dimensionless;
  PK_alpha_inp = (1 - PK_f)*(PK_alpha - PK_alpha_end) + PK_alpha_end; PK_alpha_inp has dimensionless;
  PK_alpha_p_inp = (1 - PK_f_p)*(PK_alpha_p - PK_alpha_end) + PK_alpha_end; PK_alpha_p_inp has dimensionless;
  PK_pep_inp = (1 - PK_f)*(PK_k_pep - PK_k_pep_end) + PK_k_pep_end; PK_pep_inp has mM;
  PK_pep_p_inp = (1 - PK_f_p)*(PK_k_pep_p - PK_k_pep_end) + PK_k_pep_end; PK_pep_p_inp has mM;
  PK_native = scale_gly*PK_Vmax*PK_alpha_inp*pep^PK_n/(PK_pep_inp^PK_n + pep^PK_n)*adp/(adp + PK_k_adp)*(PK_base_act + (1 - PK_base_act)*PK_f); PK_native has mmol_per_s;
  PK_phospho = scale_gly*PK_Vmax*PK_alpha_p_inp*pep^PK_n_p/(PK_pep_p_inp^PK_n_p + pep^PK_n_p)*adp/(adp + PK_k_adp)*(PK_base_act_p + (1 - PK_base_act_p)*PK_f_p); PK_phospho has mmol_per_s;
  PEPCK_keq = 336.9565 dimensionless;
  PEPCK_k_pep = 0.237 mM;
  PEPCK_k_gdp = 0.0921 mM;
  PEPCK_k_co2 = 25.5 mM;
  PEPCK_k_oaa = 0.0055 mM;
  PEPCK_k_gtp = 0.0222 mM;
  PEPCK_Vmax = 0 mmol_per_s;
  PEPCKM_Vmax = 546 mmol_per_s;
  PC_k_atp = 0.22 mM;
  PC_k_pyr = 0.22 mM;
  PC_k_co2 = 3.2 mM;
  PC_k_acoa = 0.015 mM;
  PC_n = 2.5 dimensionless;
  PC_Vmax = 168 mmol_per_s;
  LDH_keq = 0.0002783211 dimensionless;
  LDH_k_pyr = 0.495 mM;
  LDH_k_lac = 31.98 mM;
  LDH_k_nad = 0.984 mM;
  LDH_k_nadh = 0.027 mM;
  LDH_Vmax = 12.6 mmol_per_s;
  LACT_keq = 1 dimensionless;
  LACT_k_lac = 0.8 mM;
  LACT_Vmax = 5.418 mmol_per_s;
  PYRTM_keq = 1 dimensionless;
  PYRTM_k_pyr = 0.1 mM;
  PYRTM_Vmax = 42 mmol_per_s;
  PEPTM_keq = 1 dimensionless;
  PEPTM_k_pep = 0.1 mM;
  PEPTM_Vmax = 33.6 mmol_per_s;
  PDH_k_pyr = 0.025 mM;
  PDH_k_coa = 0.013 mM;
  PDH_k_nad = 0.05 mM;
  PDH_ki_acoa = 0.035 mM;
  PDH_ki_nadh = 0.036 mM;
  PDH_alpha_nat = 5 dimensionless;
  PDH_alpha_p = 1 dimensionless;
  PDH_Vmax = 13.44 mmol_per_s;
  PDH_base = scale_gly*PDH_Vmax*pyr_mito/(pyr_mito + PDH_k_pyr)*nad_mito/(nad_mito + PDH_k_nad*(1 + nadh_mito/PDH_ki_nadh))*coa_mito/(coa_mito + PDH_k_coa*(1 + acoa_mito/PDH_ki_acoa)); PDH_base has mmol_per_s;
  PDH_nat = PDH_base*PDH_alpha_nat; PDH_nat has mmol_per_s;
  PDH_p = PDH_base*PDH_alpha_p; PDH_p has mmol_per_s;
  CS_keq = 266599 dimensionless;
  CS_k_oaa = 0.002 mM;
  CS_k_acoa = 0.016 mM;
  CS_k_cit = 0.42 mM;
  CS_k_coa = 0.07 mM;
  CS_Vmax = 4.2 mmol_per_s;
  NDKGTPM_keq = 1 dimensionless;
  NDKGTPM_k_atp = 1.33 mM;
  NDKGTPM_k_adp = 0.042 mM;
  NDKGTPM_k_gtp = 0.15 mM;
  NDKGTPM_k_gdp = 0.031 mM;
  NDKGTPM_Vmax = 420 mmol_per_s;
  OAAFLX_Vmax = 0 mmol_per_s;
  ACOAFLX_Vmax = 0 mmol_per_s;
  CITFLX_Vmax = 0 mmol_per_s;

  // Assignment rules:
  nadh_tot := nadh + nad;
  atp_tot := atp + adp + amp;
  utp_tot := utp + udp;
  gtp_tot := gtp + gdp;
  nadh_mito_tot := nadh_mito + nad_mito;
  atp_mito_tot := atp_mito + adp_mito;
  gtp_mito_tot := gtp_mito + gdp_mito;

  // Reactions:
  GLUT2: $glc_ext -> glc; scale_gly*GLUT2_Vmax/GLUT2_km*(glc_ext - glc/GLUT2_keq)/(1 + glc_ext/GLUT2_km + glc/GLUT2_km); GLUT2 is "GLUT2 glucose transporter";
  GK: glc + $atp => glc6p + $adp; scale_gly*GK_Vmax*GK_gc_free*atp/(GK_km_atp + atp)*glc^GK_n/(glc^GK_n + GK_km_glc^GK_n); GK is "Glucokinase";  // ec-code:2.7.1.2; kegg.reaction:R00299
  G6PASE: glc6p + $h2o => glc + $phos; scale_gly*G6PASE_Vmax*glc6p/(G6PASE_km_glc6p + glc6p); G6PASE is "D-Glucose-6-phosphate Phosphatase";  // ec-code:3.1.3.9; kegg.reaction:R00303
  GPI: glc6p -> fru6p; scale_gly*GPI_Vmax/GPI_km_glc6p*(glc6p - fru6p/GPI_keq)/(1 + glc6p/GPI_km_glc6p + fru6p/GPI_km_fru6p); GPI is "D-Glucose-6-phosphate Isomerase";  // ec-code:5.3.1.9; kegg.reaction:R00771
  G16PI: glc1p -> glc6p; scale_glyglc*G16PI_Vmax/G16PI_km_glc1p*(glc1p - glc6p/G16PI_keq)/(1 + glc1p/G16PI_km_glc1p + glc6p/G16PI_km_glc6p); G16PI is "Glucose 1-phosphate 1,6-phosphomutase";  // ec-code:5.4.2.2; kegg.reaction:R00959
  UPGASE: utp + glc1p -> udpglc + pp; scale_glyglc*UPGASE_Vmax/(UPGASE_km_utp*UPGASE_km_glc1p)*(utp*glc1p - udpglc*pp/UPGASE_keq)/((1 + utp/UPGASE_km_utp)*(1 + glc1p/UPGASE_km_glc1p) + (1 + udpglc/UPGASE_km_udpglc)*(1 + pp/UPGASE_km_pp) - 1); UPGASE is "UTP:Glucose-1-phosphate uridylyltransferase";  // ec-code:2.7.7.9; kegg.reaction:R00289
  PPASE: pp + $h2o => 2 $phos; scale_glyglc*PPASE_Vmax*pp/(pp + PPASE_km_pp); PPASE is "Pyrophosphate phosphohydrolase";  // ec-code:3.6.1.1; kegg.reaction:R00004
  GS: udpglc => udp + glyglc; (1 - gamma)*GS_native + gamma*GS_phospho; GS is "Glycogen synthase";
  GP: glyglc + $phos -> glc1p; (1 - gamma)*GP_native + gamma*GP_phospho; GP is "Glycogen-Phosphorylase";
  NDKGTP: $atp + gdp -> $adp + gtp; scale_gly*NDKGTP_Vmax/(NDKGTP_km_atp*NDKGTP_km_gdp)*(atp*gdp - adp*gtp/NDKGTP_keq)/((1 + atp/NDKGTP_km_atp)*(1 + gdp/NDKGTP_km_gdp) + (1 + adp/NDKGTP_km_adp)*(1 + gtp/NDKGTP_km_gtp) - 1); NDKGTP is "Nucleoside-diphosphate kinase (ATP, GTP)";  // ec-code:2.7.4.6; kegg.reaction:R00330
  NDKUTP: $atp + udp -> $adp + utp; scale_glyglc*NDKUTP_Vmax/(NDKUTP_km_atp*NDKUTP_km_udp)*(atp*udp - adp*utp/NDKUTP_keq)/((1 + atp/NDKUTP_km_atp)*(1 + udp/NDKUTP_km_udp) + (1 + adp/NDKUTP_km_adp)*(1 + utp/NDKUTP_km_utp) - 1); NDKUTP is "Nucleoside-diphosphate kinase (ATP, UTP)";  // ec-code:2.7.4.6; kegg.reaction:R00156
  AK: $atp + $amp -> 2 $adp; scale_gly*AK_Vmax/(AK_km_atp*AK_km_amp)*(atp*amp - adp*adp/AK_keq)/((1 + atp/AK_km_atp)*(1 + amp/AK_km_amp) + (1 + adp/AK_km_adp)*(1 + adp/AK_km_adp) - 1); AK is "ATP:AMP phosphotransferase (Adenylatkinase)";  // ec-code:2.7.4.3; kegg.reaction:R00127
  PFK2: fru6p + $atp => fru26bp + $adp; (1 - gamma)*PFK2_native + gamma*PFK2_phospho; PFK2 is "ATP:D-fructose-6-phosphate 2-phosphotransferase";  // ec-code:2.7.1.105; kegg.reaction:R02732
  FBP2: fru26bp => fru6p + $phos; (1 - gamma)*FBP2_native + gamma*FBP2_phospho; FBP2 is "D-Fructose-2,6-bisphosphate 2-phosphohydrolase";  // ec-code:3.1.3.46; kegg.reaction:R02731
  PFK1: fru6p + $atp => fru16bp + $adp; scale_gly*PFK1_Vmax*(1 - 1/(1 + fru26bp/PFK1_ka_fru26bp))*fru6p*atp/(PFK1_ki_fru6p*PFK1_km_atp + PFK1_km_fru6p*atp + PFK1_km_atp*fru6p + atp*fru6p); PFK1 is "ATP:D-fructose-6-phosphate 1-phosphotransferase";  // modifiers: fru26bp; ec-code:2.7.1.11; kegg.reaction:R00756
  FBP1: fru16bp + $h2o => fru6p + $phos; scale_gly*FBP1_Vmax/(1 + fru26bp/FBP1_ki_fru26bp)*fru16bp/(fru16bp + FBP1_km_fru16bp); FBP1 is "D-Fructose-1,6-bisphosphate 1-phosphohydrolase";  // modifiers: fru26bp; ec-code:3.1.3.11; kegg.reaction:R00762
  ALD: fru16bp -> grap + dhap; scale_gly*ALD_Vmax/ALD_km_fru16bp*(fru16bp - grap*dhap/ALD_keq)/(1 + fru16bp/ALD_km_fru16bp + grap/ALD_ki1_grap + dhap*(grap + ALD_km_grap)/(ALD_km_dhap*ALD_ki1_grap) + fru16bp*grap/(ALD_km_fru16bp*ALD_ki2_grap)); ALD is "Aldolase";  // ec-code:4.1.2.13; kegg.reaction:R01068
  TPI: dhap -> grap; scale_gly*TPI_Vmax/TPI_km_dhap*(dhap - grap/TPI_keq)/(1 + dhap/TPI_km_dhap + grap/TPI_km_grap); TPI is "Triosephosphate Isomerase";  // ec-code:5.3.1.1; kegg.reaction:R01015
  GAPDH: grap + $phos + $nad -> bpg13 + $nadh + $h; scale_gly*GAPDH_Vmax/(GAPDH_k_nad*GAPDH_k_grap*GAPDH_k_p)*(nad*grap*phos - bpg13*nadh/GAPDH_keq)/((1 + nad/GAPDH_k_nad)*(1 + grap/GAPDH_k_grap)*(1 + phos/GAPDH_k_p) + (1 + nadh/GAPDH_k_nadh)*(1 + bpg13/GAPDH_k_bpg13) - 1); GAPDH is "D-Glyceraldehyde-3-phosphate:NAD+ oxidoreductase";  // ec-code:1.2.1.12; kegg.reaction:R01061
  PGK: $adp + bpg13 -> $atp + pg3; scale_gly*PGK_Vmax/(PGK_k_adp*PGK_k_bpg13)*(adp*bpg13 - atp*pg3/PGK_keq)/((1 + adp/PGK_k_adp)*(1 + bpg13/PGK_k_bpg13) + (1 + atp/PGK_k_atp)*(1 + pg3/PGK_k_pg3) - 1); PGK is "Phosphoglycerate Kinase";  // ec-code:2.7.2.3; kegg.reaction:R01512
  PGM: pg3 -> pg2; scale_gly*PGM_Vmax*(pg3 - pg2/PGM_keq)/(pg3 + PGM_k_pg3*(1 + pg2/PGM_k_pg2)); PGM is "2-Phospho-D-glycerate 2,3-phosphomutase";  // ec-code:5.4.2.1; kegg.reaction:R01518
  EN: pg2 -> pep; scale_gly*EN_Vmax*(pg2 - pep/EN_keq)/(pg2 + EN_k_pg2*(1 + pep/EN_k_pep)); EN is "2-Phospho-D-glucerate hydro-lyase (enolase)";  // ec-code:4.2.1.11; kegg.reaction:R00658
  PK: pep + $adp => pyr + $atp; (1 - gamma)*PK_native + gamma*PK_phospho; PK is "Pyruvatkinase";  // ec-code:2.7.1.40; kegg.reaction:R00200
  PEPCK: oaa + gtp -> pep + gdp + $co2; scale_gly*PEPCK_Vmax/(PEPCK_k_oaa*PEPCK_k_gtp)*(oaa*gtp - pep*gdp*co2/PEPCK_keq)/((1 + oaa/PEPCK_k_oaa)*(1 + gtp/PEPCK_k_gtp) + (1 + pep/PEPCK_k_pep)*(1 + gdp/PEPCK_k_gdp)*(1 + co2/PEPCK_k_co2) - 1); PEPCK is "PEPCK cyto";  // ec-code:4.1.1.32; kegg.reaction:R00431
  PEPCKM: oaa_mito + gtp_mito -> pep_mito + gdp_mito + $co2_mito; scale_gly*PEPCKM_Vmax/(PEPCK_k_oaa*PEPCK_k_gtp)*(oaa_mito*gtp_mito - pep_mito*gdp_mito*co2_mito/PEPCK_keq)/((1 + oaa_mito/PEPCK_k_oaa)*(1 + gtp_mito/PEPCK_k_gtp) + (1 + pep_mito/PEPCK_k_pep)*(1 + gdp_mito/PEPCK_k_gdp)*(1 + co2_mito/PEPCK_k_co2) - 1); PEPCKM is "PEPCK mito";  // ec-code:4.1.1.32; kegg.reaction:R00431
  PC: $atp + pyr + $co2 => oaa + $adp + $phos; scale_gly*PC_Vmax*atp_mito/(PC_k_atp + atp_mito)*pyr_mito/(PC_k_pyr + pyr_mito)*co2_mito/(PC_k_co2 + co2_mito)*acoa_mito^PC_n/(acoa_mito^PC_n + PC_k_acoa^PC_n); PC is "Pyruvate Carboxylase";  // modifiers: co2_mito, acoa_mito, pyr_mito, atp_mito; ec-code:6.4.1.1; kegg.reaction:R00344
  LDH: pyr + $nadh -> lac + $nad; scale_gly*LDH_Vmax/(LDH_k_pyr*LDH_k_nadh)*(pyr*nadh - lac*nad/LDH_keq)/((1 + nadh/LDH_k_nadh)*(1 + pyr/LDH_k_pyr) + (1 + lac/LDH_k_lac)*(1 + nad/LDH_k_nad) - 1); LDH is "Lactate Dehydrogenase";  // ec-code:1.1.1.27; kegg.reaction:R00703
  LACT: $lac_ext -> lac; scale_gly*LACT_Vmax/LACT_k_lac*(lac_ext - lac/LACT_keq)/(1 + lac_ext/LACT_k_lac + lac/LACT_k_lac); LACT is "Lactate transport (import)";
  PYRTM: pyr -> pyr_mito; scale_gly*PYRTM_Vmax/PYRTM_k_pyr*(pyr - pyr_mito/PYRTM_keq)/(1 + pyr/PYRTM_k_pyr + pyr_mito/PYRTM_k_pyr); PYRTM is "Pyruvate transport (mito)";
  PEPTM: pep_mito -> pep; scale_gly*PEPTM_Vmax/PEPTM_k_pep*(pep_mito - pep/PEPTM_keq)/(1 + pep/PEPTM_k_pep + pep_mito/PEPTM_k_pep); PEPTM is "PEP Transport (export mito)";
  PDH: pyr_mito + $coa_mito + $nad_mito => $acoa_mito + $co2_mito + $nadh_mito + $h_mito; (1 - gamma)*PDH_nat + gamma*PDH_p; PDH is "Pyruvate Dehydrogenase";  // ec-code:1.2.4.1; kegg.reaction:R00209
  CS: $acoa_mito + oaa_mito + $h2o_mito -> $cit_mito + $coa_mito; scale_gly*CS_Vmax/(CS_k_oaa*CS_k_acoa)*(acoa_mito*oaa_mito - cit_mito*coa_mito/CS_keq)/((1 + acoa_mito/CS_k_acoa)*(1 + oaa_mito/CS_k_oaa) + (1 + cit_mito/CS_k_cit)*(1 + coa_mito/CS_k_coa) - 1); CS is "Citrate Synthase";  // ec-code:2.3.3.1; kegg.reaction:R00351
  NDKGTPM: $atp_mito + gdp_mito -> $adp_mito + gtp_mito; scale_gly*NDKGTPM_Vmax/(NDKGTPM_k_atp*NDKGTPM_k_gdp)*(atp_mito*gdp_mito - adp_mito*gtp_mito/NDKGTPM_keq)/((1 + atp_mito/NDKGTPM_k_atp)*(1 + gdp_mito/NDKGTPM_k_gdp) + (1 + adp_mito/NDKGTPM_k_adp)*(1 + gtp_mito/NDKGTPM_k_gtp) - 1); NDKGTPM is "Nucleoside-diphosphate kinase (ATP, GTP) mito";  // ec-code:2.7.4.6; kegg.reaction:R00330
  OAAFLX: => oaa_mito; scale_gly*OAAFLX_Vmax; OAAFLX is "oxalacetate influx";
  ACOAFLX: $acoa_mito => ; scale_gly*ACOAFLX_Vmax; ACOAFLX is "acetyl-coa efflux";
  CITFLX: $cit_mito => ; scale_gly*CITFLX_Vmax; CITFLX is "citrate efflux";

  // Unit definitions:
  unit substance = 1e-3 mole;
  unit volume = litre;
  unit area = metre^2;
  unit length = metre;
  unit per_s = 1 / second;
  unit minute = 60 second;
  unit mmol = 1e-3 mole;
  unit mM = 1e-3 mole / litre;
  unit per_mM = litre / (1e-3 mole);
  unit mMmM = (1e-3 mole)^2 / litre^2;
  unit mmol_per_s = 1e-3 mole / second;
  unit pmol = 1e-12 mole;
  unit pmol_per_l = 1e-12 mole / litre;
  unit mM_litre = 1e-3 mole;
end
