// SBML level 3 version 1

function max(x, y)
  piecewise(x, x > y, y);
end

function min(x, y)
  piecewise(x, x < y, y);
end

model Koenig2014_hepatic_glucose()
  // model units - substance: substance, volume: volume, area: area, length: length

  // Compartments:
  compartment extern = 10 litre;
  compartment cyto = 1 litre;
  compartment mito = 5 litre;

  // Species:
  species $atp in cyto = 2.8;
  species $adp in cyto = 0.8;
  species amp in cyto = 0.16;
  species utp in cyto = 0.27;
  species udp in cyto = 0.09;
  species gtp in cyto = 0.29;
  species gdp in cyto = 0.1;
  species $nad in cyto = 1.22;
  species $nadh in cyto = 0.00056;
  species $phos in cyto = 5;
  species pp in cyto = 0.008;
  species $co2 in cyto = 5;
  species glc1p in cyto = 0.012;
  species udpglc in cyto = 0.38;
  species glyglc in cyto = 250;
  species glc in cyto = 5;
  species glc6p in cyto = 0.12;
  species fru6p in cyto = 0.05;
  species fru16bp in cyto = 0.02;
  species fru26bp in cyto = 0.004;
  species grap in cyto = 0.1;
  species dhap in cyto = 0.03;
  species bpg13 in cyto = 0.3;
  species pg3 in cyto = 0.27;
  species pg2 in cyto = 0.03;
  species pep in cyto = 0.15;
  species pyr in cyto = 0.1;
  species oaa in cyto = 0.01;
  species lac in cyto = 0.5;
  species glc_ext in extern = 3;
  species lac_ext in extern = 1.2;
  species $co2_mito in mito = 5;
  species $phos_mito in mito = 5;
  species pep_mito in mito = 0.15;
  species acoa_mito in mito = 0.04;
  species pyr_mito in mito = 0.1;
  species cit_mito in mito = 0.32;
  species $atp_mito in mito = 2.8;
  species $adp_mito in mito = 0.8;
  species $gtp_mito in mito = 0.29;
  species $gdp_mito in mito = 0.1;
  species coa_mito in mito = 0.055;
  species $nadh_mito in mito = 0.24;
  species nad_mito in mito = 0.98;

  // Parameters:
  oaa_mito = 0.01 mM;
  x_ins1 = 818.9;
  x_ins2 = 0;
  x_ins3 = 8.6;
  x_ins4 = 4.2;
  x_glu1 = 190;
  x_glu2 = 37.9;
  x_glu3 = 3.01;
  x_glu4 = 6.4;
  x_epi1 = 6090;
  x_epi2 = 100;
  x_epi3 = 3.1;
  x_epi4 = 8.4;
  K_val = 0.1;
  epi_f = 0.8;
  K_ins = (x_ins1 - x_ins2)*K_val;
  K_glu = (x_glu1 - x_glu2)*K_val;
  K_epi = (x_epi1 - x_epi2)*K_val;
  ATPS_keq = 0.58 per_mM;
  ATPS_kadp = 0.1 mM;
  ATPS_katp = 0.5 mM;
  ATPS_kphos = 0.1 mM;
  ATPS_Vmax = 20 mmol_per_s;

  // Assignment rules:
  nadh_tot := nadh + nad;
  atp_tot := atp + adp + amp;
  utp_tot := utp + udp;
  gtp_tot := gtp + gdp;
  nadh_mito_tot := nadh_mito + nad_mito;
  atp_mito_tot := atp_mito + adp_mito;
  gtp_mito_tot := gtp_mito + gdp_mito;
  ins := max(0, (x_ins1 - x_ins2)*glc_ext^x_ins4/(glc_ext^x_ins4 + x_ins3^x_ins4));
  glu := max(0, (x_glu1 - x_glu2)*(1 - glc_ext^x_glu4/(glc_ext^x_glu4 + x_glu3^x_glu4)));
  epi := max(0, (x_epi1 - x_epi2)*(1 - glc_ext^x_epi4/(glc_ext^x_epi4 + x_epi3^x_glu4)));
  gamma := 0.5*(1 - ins/(ins + K_ins) + max(glu/(glu + K_glu), epi_f*epi/(epi + K_epi)));

  // Reactions:
  ATPS: $adp + $phos -> $atp; ATPS_Vmax/(ATPS_kadp*ATPS_kphos)*(adp*phos - atp/ATPS_keq)/((1 + adp/ATPS_kadp)*(1 + phos/ATPS_kphos) + atp/ATPS_katp); ATPS is "ATP synthase";

  // Unit definitions:
  unit substance = 1e-3 mole;
  unit volume = litre;
  unit area = metre^2;
  unit length = metre;
  unit mM = 1e-3 mole / litre;
  unit per_mM = litre / (1e-3 mole);
  unit mmol_per_s = 1e-3 mole / second;
  unit per_s = 1 / second;
  unit mmol = 1e-3 mole;
  unit pmol_per_l = 1e-12 mole / litre;
end
